<?xml version="1.0"?>

<propeller name="Clark Y 0.10 t/c ratio variable pitch">
  <ixx>                1.8 </ixx>
  <diameter unit="IN"> 132.0 </diameter>
  <numblades>          2   </numblades>
  <minpitch>          11   </minpitch>
  <maxpitch>          27   </maxpitch>
  <minrpm>           700   </minrpm>
  <maxrpm>          2700   </maxrpm>

  <ct_factor>          1.5 </ct_factor>
  <cp_power>           1.5 </cp_power>

  <table name="C_THRUST" type="internal">
    <tableData>
                 11.0000  15.0000  19.0000   23.0000  27.0000
        0.1000   0.0750   0.0818    0.0910   0.0870   0.0950
        0.1500   0.0670   0.0795    0.0910   0.0882   0.0933
        0.2000   0.0630   0.0770    0.0900   0.0889   0.0925
        0.2500   0.0580   0.0742    0.0884   0.0890   0.0915
        0.3000   0.0525   0.0702    0.0860   0.0890   0.0908
        0.3500   0.0460   0.0660    0.0832   0.0886   0.0898
        0.4000   0.0395   0.0612    0.0801   0.0880   0.0888
        0.4500   0.0330   0.0560    0.0757   0.0864   0.0882
        0.5000   0.0255   0.0500    0.0708   0.0845   0.0880
        0.5500   0.0170   0.0416    0.0655   0.0817   0.0877
        0.6000   0.0095   0.0330    0.0591   0.0780   0.0870
        0.6500   -0.0010  0.0248    0.0520   0.0732   0.0858
        0.7000   -0.0095  0.0175    0.0450   0.0672   0.0830
        0.7500   -0.0170  0.0105    0.0368   0.0610   0.0800
        0.8000   -0.0255  -0.0010   0.0294   0.0547   0.0752
        0.8500   -0.0330  -0.0095   0.0224   0.0483   0.0703
        0.9000   -0.0395  -0.0170  -0.0010   0.0416   0.0651
        0.9500   -0.0460  -0.0255  -0.0095   0.0349   0.0591
        1.0000   -0.0525  -0.0330  -0.0170   0.0280   0.0530
        1.0500   -0.0580  -0.0395  -0.0255   0.0211   0.0467
        1.1000   -0.0630  -0.0460  -0.0330   0.0142   0.0402
        1.1500   -0.0670  -0.0525  -0.0395   0.0072   0.0337
        1.2000   -0.0750  -0.0580  -0.0460   -0.0010  0.0270
        1.2500   -0.0790  -0.0630  -0.0525   -0.0095  0.0201
        1.3000   -0.0800  -0.0670  -0.0580   -0.0170  0.0130
        1.3500   -0.0800  -0.0750  -0.0630   -0.0255  0.0056
        1.4000   -0.0800  -0.0790  -0.0670   -0.0330  -0.0010
        1.4500   -0.0800  -0.0800  -0.0750   -0.0395  -0.0095
        1.5000   -0.0800  -0.0800  -0.0790   -0.0460  -0.0170
        1.5500   -0.0800  -0.0800  -0.0800   -0.0525  -0.0255
        1.6000   -0.0800  -0.0800  -0.0800   -0.0580  -0.0330
        1.6500   -0.0800  -0.0800  -0.0800   -0.0630  -0.0395
        1.7000   -0.0800  -0.0800  -0.0800   -0.0670  -0.0460
        1.7500   -0.0800  -0.0800  -0.0800   -0.0750  -0.0525
        1.8000   -0.0800  -0.0800  -0.0800   -0.0790  -0.0580
        1.8500   -0.0800  -0.0800  -0.0800   -0.0800  -0.0630
        1.9000   -0.0800  -0.0800  -0.0800   -0.0800  -0.0670
        1.9500   -0.0800  -0.0800  -0.0800   -0.0800  -0.0750
        2.0000   -0.0800  -0.0800  -0.0800   -0.0800  -0.0790
        3.0000   -0.0810  -0.0800  -0.0800   -0.0800  -0.0800
        4.0000   -0.0820  -0.0800  -0.0800   -0.0800  -0.0800
      </tableData>
    </table>

  <table name="C_POWER" type="internal">
    <tableData>
               11.0000  15.000  19.000  23.000  27.000
        0.1000  0.0295  0.0400  0.0520  0.0769  0.1055
        0.1500  0.0290  0.0400  0.0521  0.0755  0.1029
        0.2000  0.0285  0.0400  0.0523  0.0740  0.1000
        0.2500  0.0280  0.0400  0.0525  0.0720  0.0972
        0.3000  0.0265  0.0397  0.0526  0.0695  0.0950
        0.3500  0.0248  0.0392  0.0527  0.0676  0.0922
        0.4000  0.0226  0.0384  0.0528  0.0663  0.0900
        0.4500  0.0205  0.0370  0.0523  0.0656  0.0880
        0.5000  0.0170  0.0348  0.0513  0.0658  0.0863
        0.5500  0.0129  0.0302  0.0498  0.0659  0.0852
        0.6000  0.0080  0.0255  0.0472  0.0656  0.0839
        0.6500  0.0040  0.0208  0.0436  0.0646  0.0835
        0.7000  0.0038  0.0164  0.0394  0.0620  0.0822
        0.7500  0.0040  0.0115  0.0345  0.0588  0.0814
        0.8000  0.0080  0.0070  0.0294  0.0551  0.0791
        0.8500  0.0129  0.0065  0.0238  0.0510  0.0766
        0.9000  0.0170  0.0070  0.0120  0.0461  0.0739
        0.9500  0.0205  0.0115  0.0100  0.0408  0.0700
        1.0000  0.0226  0.0164  0.0120  0.0349  0.0652
        1.0500  0.0248  0.0208  0.0180  0.0284  0.0597
        1.1000  0.0265  0.0255  0.0238  0.0214  0.0536
        1.1500  0.0280  0.0302  0.0294  0.0140  0.0469
        1.2000  0.0290  0.0348  0.0345  0.0120  0.0398
        1.2500  0.0295  0.0370  0.0394  0.0140  0.0321
        1.3000  0.0300  0.0384  0.0436  0.0214  0.0240
        1.3500  0.0300  0.0392  0.0472  0.0284  0.0157
        1.4500  0.0300  0.0397  0.0498  0.0349  0.0140
        1.5500  0.0300  0.0400  0.0513  0.0461  0.0240
        1.6500  0.0300  0.0400  0.0523  0.0551  0.0400
        1.7500  0.0300  0.0400  0.0528  0.0620  0.0536
        1.8500  0.0300  0.0400  0.0527  0.0656  0.0607
        1.9500  0.0300  0.0400  0.0526  0.0658  0.0669
        2.0350  0.0300  0.0400  0.0525  0.0663  0.0700
        3.0000  0.0300  0.0400  0.0523  0.0740  0.0928
        4.0000  0.0300  0.0400  0.0521  0.0769  0.1000
    </tableData>
  </table>

</propeller>
